// COMSOL Multiphysics 6.3.0.290 model "cantilever.mph"
// Outline of the model tree

Geometry
  geom1 "Geometry 1" (2D, length unit µm)
    r1: Rectangle | size = {100, 10}
    fin: Finalize "Form Union"

Materials
  mat1: Common "Si - Silicon (single-crystal, isotropic)" on all domains
    def: def "Basic"
      thermalexpansioncoefficient = 2.6e-6[1/K]
      heatcapacity = 700[J/(kg*K)]
      relpermittivity = 11.7
      density = 2329[kg/m^3]
      thermalconductivity = 130[W/(m*K)]
    Enu: Enu "Young's modulus and Poisson's ratio"
      E = 170e9[Pa]
      nu = 0.28

Physics
  solid: SolidMechanics on domains 1
    dependent variable u = {u, v, w}
    d.d = 10[um]
    lemm1: LinearElasticModel "Linear Elastic Material 1" (default)
    free1: Free (default)
    init1: init "Initial Values 1" (default)
    fix1: Fixed "Fixed Constraint 1" on boundaries 4
    bndl1: BoundaryLoad on boundaries 1 | forceType = TotalForce; force = {0, 1[µN], 0}; coordinateSystem = GlobalSystem

Mesh
  mesh1 "Mesh 1" (physics-controlled)
    size: MeshSizeDefault | hauto = 1

Studies
  std1 "Study 1"
    stat: Stationary

Solver configurations
  sol1 "Solution 1" (study std1)
    v1: Variables "Dependent Variables 1"
    s1: Stationary "Stationary Solver 1"
      dDef: Direct
      fc1: FullyCoupled

Datasets
  dset1: Solution | solution = sol1

Derived values
  pev1: EvalPoint "Point Evaluation 1" on points 1
    data = dset1
    table = tbl1
    expr = solid.disp
    unit = µm
    descr = Displacement magnitude

Tables
  tbl1: Table
    // Point Evaluation 1
    Displacement magnitude (µm), Point: 1
    0.00218088

Plots
  pg1: PlotGroup2D "Stress (solid)" | data = dset1
    surf1: Surface | expr = solid.disp; descr = Displacement magnitude
      def: Deform "Deformation" | expr = {u, v}; descr = Displacement field

Exports
  data1: Data "Displacement" | data = dset1; expr = solid.disp; filename = comsol_displacement.txt